U_loadNom := 100  # Напряжение нагрузки [V]
i_load := 0.005  # Ток нагрузки [A]
U_supply := 12  # Напряжение питания бустерной схемы, [V]
R_T := 10*10^3
C_T := 4700*10^-12  # Частотозадающие параметры генератора ИС uc3843 [Ohm, F]
f_osc := 1.72/(R_T*C_T) = 36595.7  # Частота генератора ИС uc3843 [Hz]
C_boost := 4.7*10^-6  # Емкость бустерного конденсатора [F]
L := 100*10^-6  # Дроссель [H]
# Номиналы резисторов делителя напряжений обратной связи ИС uc3843 [Ohm]
R_1back := 1.2*10^6
R_2backPot := 20*10^3
R_3back := 10*10^3
U_backStop := 2.5  # Пороговое напряжение обратной связи, если выше него - ШИМ уменьшается
U_outMin := U_backStop*(R_1back + R_2backPot + R_3back)/(R_2backPot + R_3back) = 102.5  # Минимальное напряжение на выходе для данного делителя
U_outMax := U_backStop*(R_1back + R_2backPot + R_3back)/R_3back = 307.5  # Максимальное напряжение на выходе для данного делителя
I_backMax := U_outMax/(R_1back + R_2backPot + R_3back) = 0.00025  # Максимальный ток через делитель напряжения
P_max1 := I_backMax^2*R_1back = 0.075  # Рассеиваемые мощности на резисторах делителя
P_max2 := I_backMax^2*R_2backPot = 0.00125
P_max3 := I_backMax^2*R_3back = 0.000625
# Расчет тока зарядки мощного ключа МС uc3843
C_MOP := 1000*10^-12
T_riseTimeUC3843 := 50*10^-9
T_fallTimeUC3843 := 50*10^-9
I_gate := C_MOP*15/T_riseTimeUC3843 = 0.3
# Расчет rc-фильтра на выходе ОУ INA122P
R_filterAmp := 1000
C_filterAmp := 1000*10^-9
f_cutOff := 1/(2*π*R_filterAmp*C_filterAmp) = 159.155
